<?xml version="1.0"?>


<!--
	File:     PW4056.xml
	Author:   ###
	License:    GNU GPL V2

	name:               Pratt and Whitney PW4056
	type:               turbine
	thrust:             56870 lb
	augmented?          no
	injected?           yes
	bypass ratio:          5.2

	n1 max-safe speed:     109.8
	n2 max-safe speed:     97.1
Sources:
https://drs.faa.gov/browse/excelExternalWindow/2A822313BEA2157886257F060055BEB1.0001
https://www.youtube.com/watch?v=P6mvYyyMHV0

-->

<turbine_engine name="PW4056">
    <milthrust>   56750   </milthrust>
    <bypassratio>     4.9  </bypassratio>
<!--	<idleepr>1.602</idleepr>
	<minepr>1.01</minepr>-->
	<ignitionn1>4.0</ignitionn1><!-- According to youtube video-->
	<ignitionn2>25</ignitionn2><!--According to youtube video-->
    <tsfc>            0.3651 </tsfc>
	<bleed>           0.03  </bleed>
	<idlen1>         25.93   </idlen1>
	<idlen2>         66.0   </idlen2>
	<maxn1>         109.8   </maxn1><!--Maximum Continious-->
	<maxn2>         97.1   </maxn2><!--Maximum Continious-->
	<n1spinup>0.108</n1spinup> <!-- ~37 seconds -->
	<n2spinup>0.675</n2spinup> <!-- ~37 seconds -->
	<n1startrate>0.353</n1startrate> <!-- ~62 seconds -->
	<n2startrate>0.66</n2startrate> <!-- ~62 seconds -->
	<augmented>         0   </augmented>
	<injected>          0   </injected>

<!--Spool up and Spool Down data taken from MD-11 (File 1)-->

	<function name="N1SpoolUp">
		<table>
			<independentVar lookup="row">propulsion/engine[0]/n1</independentVar>
			<tableData>
				 24   1.1
				 28   2.9
				 46   9.7
				 68  15.4
				 80  19.6
				 94  21.4
				103  23.6
			</tableData>
		</table>
	</function>

	<function name="N1SpoolDown">
		<table>
			<independentVar lookup="row">propulsion/engine[0]/n1</independentVar>
			<tableData>
				 24   1.1
				 28   2.9
				 46   9.7
				 68  15.4
				 80  19.6
				 94  21.4
				103  23.6
			</tableData>
		</table>
	</function>

	<function name="N2SpoolUp"> <!-- N1 to N2 factor 0.461187214611872 -->
		<table>
			<independentVar lookup="row">propulsion/engine[0]/n1</independentVar>
			<tableData>
				 24   0.5
				 28   1.3
				 46   4.5
				 68   7.1
				 80   9.0
				 94   9.9
				103  10.9
			</tableData>
		</table>
	</function>

	<function name="N2SpoolDown"> <!-- N1 to N2 factor 0.461187214611872 -->
		<table>
			<independentVar lookup="row">propulsion/engine[0]/n1</independentVar>
			<tableData>
				 24   0.5
				 28   1.3
				 46   4.5
				 68   7.1
				 80   9.0
				 94   9.9
				103  10.9
			</tableData>
		</table>
	</function>

	<function name="IdleThrust">
		<table>
			<independentVar lookup="row">velocities/mach</independentVar>
			<independentVar lookup="column">atmosphere/density-altitude</independentVar>
			<tableData>
				    -10000   0       10000   20000   30000   43000   50000
				0.0  0.0430  0.0458  0.0378  0.0684  0.0654  0.0623  0.0000
				0.2  0.0500  0.0291  0.0205  0.0514  0.0539  0.0563  0.0000
				0.4  0.0040  0.0047  0.0012  0.0412  0.0460  0.0507  0.0000
				0.6  0.0000  0.0000  0.0000  0.0000  0.0181  0.0362  0.0000
				0.8  0.0000  0.0000  0.0000  0.0000  0.0158  0.0315  0.0000
				1.0  0.0000  0.0000  0.0000  0.0000  0.0000  0.0204  0.0000
			</tableData>
		</table>
	</function>

	<function name="MilThrust"> <!-- If you change this, make sure you update the table in the engine system file -->
			<table>
				<independentVar lookup="row">velocities/mach</independentVar>
				<independentVar lookup="column">atmosphere/density-altitude</independentVar>
				<tableData>
					    -10000   0       10000   20000   30000   43000   50000
					0.0  1.2600  1.0000  0.7400  0.5640  0.3920  0.2840  0.0000
					0.2  1.1710  0.9740  0.6970  0.5360  0.3850  0.2740  0.0000
					0.4  1.1500  0.9570  0.6920  0.5460  0.3870  0.2670  0.0000
					0.6  1.1810  0.9410  0.7210  0.5660  0.3580  0.2310  0.0000
					0.8  1.2290  1.0200  0.7820  0.5570  0.3040  0.2060  0.0000
					0.9  1.2580  1.0200  0.7820  0.5220  0.2710  0.1270  0.0000
					1.0  1.1810  0.9510  0.7210  0.4410  0.1740  0.0580  0.0000
					1.2  0.0000  0.0000  0.0000  0.0000  0.0000  0.0000  0.0000
					1.4  0.0000  0.0000  0.0000  0.0000  0.0000  0.0000  0.0000
				</tableData>
			</table>
	</function>

</turbine_engine>
